// COMSOL Multiphysics 5.2.1.262 model "580um_Harmonic1V_Acoustic-Structure.mph"
// Outline of the model tree

Parameters
  fr_i = 287[kHz]  // Frequency of Interest
  dia_c = 580[um]  // Cavity Diameter
  rad_c = dia_c/2  // Cavity Radius
  thk_si = 5[um]  // Silicon thickness
  thk_mo = 0.2[um]  // Molybdenum Thickness
  thk_aln = 1[um]  // AlN Thickness
  thk_sio = 0.4[um]  // SiO2 Thickness
  dia_e = dia_c*65/100  // Top Electrode Diameter
  rad_e = dia_e/2  // Top Electrode Radius
  thk_c = wl  // Cavity Thickness (Depth)
  wl = 340[m/s]/fr_i  // Wavelength in Air

Geometry
  geom1 "Geometry 1" (2D axisymmetric, length unit µm)
    r1: Rectangle "Substrate" | pos = {rad_c, -thk_c}; size = {rad_c, thk_c}
    r2: Rectangle "Silicon" | pos = {0, 0}; size = {rad_c+rad_c, thk_si}
    r3: Rectangle "BottomE" | pos = {0, thk_si}; size = {rad_c+rad_c, thk_mo}
    r4: Rectangle "AlN" | pos = {0, thk_si+thk_mo}; size = {rad_c+rad_c, thk_aln}
    r5: Rectangle "TopE" | pos = {0, thk_si+thk_mo+thk_aln}; size = {rad_e, thk_mo}
    r6: Rectangle "SiO2" | pos = {0, thk_si+thk_mo+thk_aln}; size = {rad_c+rad_c, thk_sio}
    c1: Circle "Air" | pos = {0, -thk_c}; r = thk_c+4*wl; angle = 90
    fin: Finalize "Form Union"

Materials
  mat1: Common "Si - Silicon (single-crystal, anisotropic)" on domains 2, 8
    def "Basic"
      density = 2330[kg/m^3]
    Anisotropic
      D = {166[GPa], 64[GPa], 64[GPa], 0[GPa], 0[GPa], 0[GPa], 64[GPa], 166[GPa], 64[GPa], 0[GPa], 0[GPa], 0[GPa], 64[GPa], 64[GPa], 166[GPa], 0[GPa], 0[GPa], 0[GPa], 0[GPa], 0[GPa], 0[GPa], 80[GPa], 0[GPa], 0[GPa], 0[GPa], 0[GPa], 0[GPa], 0[GPa], 80[GPa], 0[GPa], 0[GPa], 0[GPa], 0[GPa], 0[GPa], 0[GPa], 80[GPa]}
      eta_D = {0, 0, 0, 0, 0, 0, 0, 0, 0, 0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}
  mat2: Common "SiO2 - Silicon oxide" on domains 6
    def "Basic"
      electricconductivity = 0[S/m]
      thermalexpansioncoefficient = 0.5e-6[1/K]
      heatcapacity = 730[J/(kg*K)]
      relpermittivity = 4.2
      density = 2200[kg/m^3]
      thermalconductivity = 1.4[W/(m*K)]
    Enu "Young's modulus and Poisson's ratio"
      youngsmodulus = 70e9[Pa]
      poissonsratio = 0.17
  mat3: Common "Aluminum Nitride" on domains 4
    def "Basic"
      relpermittivity = 9
      density = 3300[kg/m^3]
    StrainCharge "Strain-charge form"
      sE = {2.85842e-012[1/Pa], -8.99652e-013[1/Pa], -3.82867e-013[1/Pa], 0[1/Pa], 0[1/Pa], 0[1/Pa], -8.99652e-013[1/Pa], 3.11659e-012[1/Pa], -9.64799e-013[1/Pa], 0[1/Pa], 0[1/Pa], 0[1/Pa], -3.82867e-013[1/Pa], -9.64799e-013[1/Pa], 3.03768e-012[1/Pa], 0[1/Pa], 0[1/Pa], 0[1/Pa], 0[1/Pa], 0[1/Pa], 0[1/Pa], 8e-012[1/Pa], 0[1/Pa], 0[1/Pa], 0[1/Pa], 0[1/Pa], 0[1/Pa], 0[1/Pa], 8e-012[1/Pa], 0[1/Pa], 0[1/Pa], 0[1/Pa], 0[1/Pa], 0[1/Pa], 0[1/Pa], 8e-012[1/Pa]}
      dET = {0[C/N], 0[C/N], -1.72953e-012[C/N], 0[C/N], 0[C/N], -2.78126e-012[C/N], 0[C/N], 0[C/N], 5.49006e-012[C/N], 0[C/N], -3.84e-012[C/N], 0[C/N], -3.84e-012[C/N], 0[C/N], 0[C/N], 0[C/N], 0[C/N], 0[C/N]}
      epsilonrT = diag{9.20817, 9.20817, 10.2566}
      eta_sE = {0, 0, 0, 0, 0, 0, 0, 0, 0, 0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}
      eta_dET = {0, 0, 0, 0, 0, 0, 0, 0, 0, 0, 0, 0, 0, 0, 0, 0, 0, 0}
      eta_epsilonT = 0
    StressCharge "Stress-charge form"
      cE = {4.1e+011[Pa], 1.49e+011[Pa], 9.9e+010[Pa], 0[Pa], 0[Pa], 0[Pa], 1.49e+011[Pa], 4.1e+011[Pa], 1.49e+011[Pa], 0[Pa], 0[Pa], 0[Pa], 9.9e+010[Pa], 1.49e+011[Pa], 3.89e+011[Pa], 0[Pa], 0[Pa], 0[Pa], 0[Pa], 0[Pa], 0[Pa], 1.25e+011[Pa], 0[Pa], 0[Pa], 0[Pa], 0[Pa], 0[Pa], 0[Pa], 1.25e+011[Pa], 0[Pa], 0[Pa], 0[Pa], 0[Pa], 0[Pa], 0[Pa], 1.25e+011[Pa]}
      eES = {0[C/m^2], 0[C/m^2], -0.58[C/m^2], 0[C/m^2], 0[C/m^2], -0.58[C/m^2], 0[C/m^2], 0[C/m^2], 1.55[C/m^2], 0[C/m^2], -0.48[C/m^2], 0[C/m^2], -0.48[C/m^2], 0[C/m^2], 0[C/m^2], 0[C/m^2], 0[C/m^2], 0[C/m^2]}
      epsilonrS = 9
      eta_cE = {0, 0, 0, 0, 0, 0, 0, 0, 0, 0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}
      eta_eES = {0, 0, 0, 0, 0, 0, 0, 0, 0, 0, 0, 0, 0, 0, 0, 0, 0, 0}
      eta_epsilonS = 0
  mat4: Common "Molybdenum" on domains 3, 5
    def "Basic"
      thermalexpansioncoefficient = 4.8e-6[1/K]
      density = 10200[kg/m^3]
      heatcapacity = 250[J/(kg*K)]
      thermalconductivity = 138[W/(m*K)]
    Enu "Young's modulus and Poisson's ratio"
      youngsmodulus = 3.12e11[Pa]
      poissonsratio = 0.30
    Murnaghan
      l = -3.0e11[Pa]
      m = -8.5e11[Pa]
      n = -9.1e11[Pa]
    Lame "Lamé parameters"
      lambLame = 1.8e11[Pa]
      muLame = 1.2e11[Pa]
  mat5: Common "Air" on domains 1, 7
    def "Basic"
      dynamicviscosity = eta(T[1/K])[Pa*s]
      ratioofspecificheat = 1.4
      electricconductivity = 0[S/m]
      heatcapacity = Cp(T[1/K])[J/(kg*K)]
      density = rho(pA[1/Pa],T[1/K])[kg/m^3]
      thermalconductivity = k(T[1/K])[W/(m*K)]
      soundspeed = cs(T[1/K])[m/s]
      eta: Piecewise | arg = T; extrap = constant; pieces = {200.0, 1600.0, -8.38278E-7+8.35717342E-8*T^1-7.69429583E-11*T^2+4.6437266E-14*T^3-1.06585607E-17*T^4}
      Cp: Piecewise | arg = T; extrap = constant; pieces = {200.0, 1600.0, 1047.63657-0.372589265*T^1+9.45304214E-4*T^2-6.02409443E-7*T^3+1.2858961E-10*T^4}
      rho: Analytic | expr = pA*0.02897/8.314/T; args = {pA, T}; dermethod = manual; argders = {{pA, d(pA*0.02897/8.314/T,pA)}, {T, d(pA*0.02897/8.314/T,T)}}
      k: Piecewise | arg = T; extrap = constant; pieces = {200.0, 1600.0, -0.00227583562+1.15480022E-4*T^1-7.90252856E-8*T^2+4.11702505E-11*T^3-7.43864331E-15*T^4}
      cs: Analytic | expr = sqrt(1.4*287*T); args = T; dermethod = manual; argders = {T, d(sqrt(1.4*287*T),T)}

Physics
  acpr: PressureAcoustics "Pressure Acoustics, Frequency Domain" on domains 1, 7
    dependent variable p
    fpam1: FrequencyPressureAcousticsModel "Pressure Acoustics 1" (default)
    axi1: AxialSymmetry (default)
    shb1: SoundHard "Sound Hard Boundary (Wall) 1" (default)
    init1: init "Initial Values 1" (default)
    swr1: SphericalWaveRadiation on boundaries 2, 26
  solid: SolidMechanics on domains 2-6, 8
    dependent variable u = {u, v, w}
    lemm1: LinearElasticModel "Linear Elastic Material 1" (default)
    axi1: AxialSymmetrySolid "Axial Symmetry 1" (default)
    free1: Free (default)
    init1: init "Initial Values 1" (default)
    pzm1: PiezoelectricMaterialModel "Piezoelectric Material 1" on domains 4
    lemm2: LinearElasticModel "Linear Elastic Material 2" on domains 2, 8 | SolidModel = Anisotropic
    fix1: Fixed "Fixed Constraint 1" on boundaries 18
  es: Electrostatics on domains 4
    dependent variable V
    ccn1: ChargeConservation (default)
    axi1: AxialSymmetry (default)
    zc1: ZeroCharge (default)
    init1: init "Initial Values 1" (default)
    ccnp1: ChargeConservationPiezo "Charge Conservation, Piezoelectric 1" on all domains
    gnd1: Ground on boundaries 8
    pot1: ElectricPotential on boundaries 10 | V0 = 1

Multiphysics
  asb1: AcousticStructureBoundary on all boundaries | Acoustics_physics = acpr; Structure_physics = solid
  pze1: PiezoelectricEffect on all domains | Solid_physics = solid; Electrostatics_physics = es

Mesh
  mesh1 "Mesh 1"
    size: MeshSizeDefault | hmax = 397; hmin = 1.78; hcurve = 0.3; hnarrow = 1; hgrad = 1.3; hauto = 5
    ftri2: FreeTri "Free Triangular 2" on all domains
      size1: Size on domains 2-6 | hauto = 5
      size2: Size on domains 8 | hauto = 5
      size3: Size on domains 1, 7 | hauto = 2

Studies
  std1 "Study 1"
    freq: Frequency "Frequency Domain" | punit = kHz; plist = range(280,12/69,292)

Solver configurations
  sol1 "Solution 1" (study std1)
    v1: Variables "Dependent Variables 1"
    s1: Stationary "Stationary Solver 1" | stol = 0.001
      dDef: Direct
      p1: Parametric | pname = freq; plistarr = range(280,12/69,292); punit = kHz; pcontinuationmode = no
      fc1: FullyCoupled | linsolver = dDef; termonres = auto; reserrfact = 1000

Datasets
  dset2: Solution | solution = sol1
  rev5: Revolve2D "Revolution 2D 5" | data = dset2; genpoints = {{0, 0}, {0, 1}}; startangle = -90; revangle = 225
  rev6: Revolve2D "Revolution 2D 6" | data = dset2; genpoints = {{0, 0}, {0, 1}}; startangle = -90; revangle = 225
  rev7: Revolve2D "Revolution 2D 7"
    data = dset2
    genpoints = {{0, 0}, {0, 1}}
    spacevars = {rev1x, rev1y, rev1z}
    anglevar = rev1phi
  rev8: Revolve2D "Revolution 2D 8"
    data = dset2
    genpoints = {{0, 0}, {0, 1}}
    spacevars = {rev1x, rev1y, rev1z}
    anglevar = rev1phi
  rev9: Revolve2D "Revolution 2D 9"
    data = dset2
    genpoints = {{0, 0}, {0, 1}}
    spacevars = {rev1x, rev1y, rev1z}
    anglevar = rev1phi
  rev10: Revolve2D "Revolution 2D 10"
    data = dset2
    genpoints = {{0, 0}, {0, 1}}
    spacevars = {rev1x, rev1y, rev1z}
    anglevar = rev1phi

Tables
  tbl1: Table
    // Qfactor (solid.Q_freq)
    freq (kHz) | Quality factor for frequency (1)
    280 | 1.36039e+13
    280.245 | 1.4331e+13
    280.49 | 1.51385e+13
    280.735 | 1.60386e+13
    280.98 | 1.70452e+13
    281.224 | 1.81748e+13
    281.469 | 1.94467e+13
    281.714 | 2.08852e+13
    281.959 | 2.25175e+13
    282.204 | 2.43776e+13
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
Plots
  pg1: PlotGroup1D "1D Displacement" | data = dset2
    ptgr1: PointGraph on points 1, 7 | expr = solid.uAmpZ; xdata = solution
  pg2: PlotGroup2D "Acoustic Pressure (acpr)" | data = dset2
    surf1: Surface | expr = acpr.p_t
  pg3: PlotGroup2D "Sound Pressure Level (acpr)" | data = dset2
    surf1: Surface | expr = acpr.Lp
  pg4: PlotGroup3D "Acoustic Pressure, 3D (acpr)" | data = rev5
    surf1: Surface | expr = acpr.p_t
    surf2: Surface | expr = solid.disp
  pg5: PlotGroup3D "Sound Pressure Level, 3D (acpr)" | data = rev5
    surf1: Surface | expr = acpr.Lp
  pg6: PlotGroup2D "Stress (solid)" | data = dset2
    surf1: Surface | expr = solid.mises
      def: Deform "Deformation" | expr = {u, w}
  pg7: PlotGroup3D "Stress, 3D (solid)" | data = rev6
    surf1: Surface | expr = solid.mises
      def: Deform "Deformation" | expr = {cos(rev6phi)*u, sin(rev6phi)*u, w}; descr = Displacement field (Material)
  pg8: PlotGroup2D "Electric Potential (es)" | data = dset2
    surf1: Surface | expr = V
  pg9: PlotGroup3D "Electric Potential (es) 1" | data = rev10
    surf1: Surface | expr = V

Exports
  plot1: Plot | filename = C:\Users\skhazaaleh\Desktop\EV2_COMSOL\Qfactor\Untitled.csv